*Heading
** Job name: OS_with_imperfaction Model name: OS_with_imperfaction
** Generated by: Abaqus/CAE 2020
*Preprint, echo=NO, model=NO, history=NO, contact=NO
**
** PARTS
**
*Part, name=BIAN
*Node
      1,   304.799988,  -355.600006,         20.5
      2,   304.799988,   355.600006,         20.5
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*Element, type=S4R
   1,    1,   25,  751,  168
   2,   25,   26,  752,  751
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*Nset, nset=SET-8
    9,   10,   11,   12,   13,   14
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*Elset, elset=SET-8
  793,  794,  795,  796,  797,  798
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*Nset, nset=SET-9
    1,    2,    3,    4,    5,    6
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*Elset, elset=SET-9, generate
   1,  792,    1
*Nset, nset=SET-11
    9,   10,   11,   12,   13,   14
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*Elset, elset=SET-11, generate
  793,  1086,     1
*Elset, elset=Set-4
 214, 215, 216, 217, 218, 219
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*Elset, elset=Set-5, generate
 397,  609,    1
*Elset, elset=Set-6, generate
   1,  213,    1
** Section: ZZZJ_zong_8
*Shell Section, elset=Set-6, material=AL
2.55, 5
** Section: Section-3-SET-9
*Shell Section, elset=Set-4, material=AL, offset=SPOS
2.55, 5
** Section: ZZZJ_zong_0
*Shell Section, elset=Set-5, material=AL
2.52, 5
** Section: Section-4-SET-11
*Shell Section, elset=SET-11, material=AL, offset=SPOS
2.55, 5
*End Part
**
*Part, name=JIAJU
*Node
      1,         100.,  -465.600006,           0.
      2,        -100.,  -465.600006,           0.
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*Element, type=C3D8R
   1,  144,  993, 3073,  969,    1,   41,  741,   90
   2,  993,  994, 3074, 3073,   41,   42,  742,  741
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*Nset, nset=JIAJU-REFPT_, internal
 4745,
*Nset, nset=SET-3, generate
    1,  4744,     1
*Elset, elset=SET-3, generate
    1,  3120,     1
*Nset, nset=JIAJU-SHANG
   21,   22,   23,   24,   34,   35
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*Elset, elset=JIAJU-SHANG
 1561, 1562, 1563, 1564, 1565, 1566
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*Nset, nset=JIAJU-XIA
    3,    4,    6,    7,   10,   11
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*Elset, elset=JIAJU-XIA
  121,  122,  123,  124,  125,  126
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*Nset, nset=JIAJU-S-LOAD
   29,   30,   31,   32,  503,  504
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*Elset, elset=JIAJU-S-LOAD, generate
 1985,  2280,     5
*Nset, nset=JIAJU-X-LOAD
   13,   14,   15,   16,  245,  246
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*Elset, elset=JIAJU-X-LOAD, generate
  845,  1140,     5
*Nset, nset=OUTPUT
 4745,
** Section: Section-1-SET-3
*Solid Section, elset=SET-3, material=AL
,
*End Part
**
*Part, name=MENGPI2
*Node
      1,   160.481506,   217.800003, 0.0369560011
      2,   160.481506,   355.600006,  0.126059994
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*Element, type=S4R
   1,    1,   29,  570,   81
   2,   29,   30,  571,  570
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*Nset, nset=SET-1, generate
    1,  3980,     1
*Elset, elset=SET-1, generate
    1,  3792,     1
*Nset, nset=MENGPI2, generate
    1,  3980,     1
*Elset, elset=MENGPI2, generate
    1,  3792,     1
*Nset, nset=TOP
   2,   3,  12,  22,  42,  43
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*Elset, elset=TOP
   14,   28,   42,   56,   70,   84
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*Nset, nset=BOTTOM
  15,  19,  24,  25, 223, 224
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*Elset, elset=BOTTOM
  825,  826,  827,  828,  829,  830
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** Section: Section-5-SET-1
*Shell Section, elset=SET-1, material=AL
2.5, 5
*End Part
**
*Part, name=WANGGE
*Node
      1, -0.023343211,   253.997101,          18.
      2, -0.0216780957,   217.800003,          18.
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*Element, type=S4R
   1,    1,  165, 2709,  198
   2,  165,  166, 2710, 2709
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*Nset, nset=SET-1, generate
    1,  5096,     1
*Elset, elset=SET-1, generate
    1,  3873,     1
*Elset, elset=Set-2
   55,   56,   57, 3034, 3035, 3036
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*Elset, elset=Set-3
 2647, 2648, 2649, 2650, 2651, 2652
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*Elset, elset=Set-4
   52,   53,   54, 2128, 2129, 2130
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*Elset, elset=Set-5
    1,    2,    3,    4,    5,    6
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*Elset, elset=Set-6, generate
 1114,  1389,     1
*Elset, elset=Set-7, generate
 643,  918,    1
*Elset, elset=Set-8, generate
  58,  414,    1
*Elset, elset=Set-9
  415,  416,  417,  418,  419,  420
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*Elset, elset=Set-10
  610,  611,  612,  613,  614,  615
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*Elset, elset=Set-11
  454,  455,  456,  457,  458,  459
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*Elset, elset=Set-12
  571,  572,  573,  574,  575,  576
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*Elset, elset=Set-13
  493,  494,  495,  496,  497,  498
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*Elset, elset=Set-14
  532,  533,  534,  535,  536,  537
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** Section: ZZZJ_zong_4
*Shell Section, elset=Set-5, material=AL
2.59, 5
** Section: ZZZJ_zong_3
*Shell Section, elset=Set-4, material=AL
2.59, 5
** Section: ZZZJ_zong_1
*Shell Section, elset=Set-2, material=AL
2.59, 5
** Section: ZZZJ_zong_7
*Shell Section, elset=Set-8, material=AL
2.61, 5
** Section: ZZZJ_heng_1
*Shell Section, elset=Set-9, material=AL
2.57, 5
** Section: ZZZJ_heng_3
*Shell Section, elset=Set-11, material=AL
2.59, 5
** Section: ZZZJ_heng_5
*Shell Section, elset=Set-13, material=AL
2.61, 5
** Section: ZZZJ_heng_6
*Shell Section, elset=Set-14, material=AL
2.55, 5
** Section: ZZZJ_heng_4
*Shell Section, elset=Set-12, material=AL
2.59, 5
** Section: ZZZJ_heng_2
*Shell Section, elset=Set-10, material=AL
2.53, 5
** Section: ZZZJ_zong_6
*Shell Section, elset=Set-7, material=AL
2.58, 5
** Section: ZZZJ_zong_5
*Shell Section, elset=Set-6, material=AL
2.6, 5
** Section: ZZZJ_zong_2
*Shell Section, elset=Set-3, material=AL
2.61, 5
*End Part
**
**
** ASSEMBLY
**
*Assembly, name=Assembly
**
*Instance, name=MENGPI2-1, part=MENGPI2
          0.,           0.,        -1.25
*End Instance
**
*Instance, name=JIAJU-1, part=JIAJU
          0.,           0.,         -2.5
*End Instance
**
*Instance, name=BIAN-1, part=BIAN
          0.,           0.,         -2.5
*End Instance
**
*Instance, name=WANGGE-1, part=WANGGE
*End Instance
**
*Node
      1,           0.,   515.599976,           9.
*Nset, nset=BAN_DOWN, instance=MENGPI2-1
 24,
*Nset, nset=BAN_UP, instance=MENGPI2-1
 3,
*Nset, nset=BIAN_DI, instance=BIAN-1
   3,   4,   6,   8,   9,  12
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*Elset, elset=BIAN_DI, instance=BIAN-1
  143,  144,  145,  146,  147,  148
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*Nset, nset=MENGPICE, instance=JIAJU-1
    3,    4,    6,    7,   10,   11
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*Nset, nset=MENGPICE, instance=BIAN-1
    1,    2,    3,    4,    5,    6
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*Elset, elset=MENGPICE, instance=JIAJU-1
  121,  122,  123,  124,  125,  126
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*Elset, elset=MENGPICE, instance=BIAN-1
   1,   2,   3,   4,   5,   6
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*Nset, nset=MENGPI_CRICLE_IN, instance=BIAN-1
    9,   10,   11,   12,   13,   14
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*Elset, elset=MENGPI_CRICLE_IN, instance=BIAN-1, generate
  793,  1086,     1
*Nset, nset=MENGPI_DI, instance=MENGPI2-1, generate
    1,  3980,     1
*Elset, elset=MENGPI_DI, instance=MENGPI2-1, generate
    1,  3792,     1
*Nset, nset=MENGPI_SIDE, instance=BIAN-1
    1,    2,    3,    4,    5,    6
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*Elset, elset=MENGPI_SIDE, instance=BIAN-1, generate
   1,  792,    1
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*Nset, nset=BIAN_DI_CNS_, internal, instance=BIAN-1
   3,   4,   6,   8,   9,  12
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*Nset, nset=MENGPI_CRICLE_IN_CNS_, internal, instance=BIAN-1
    9,   10,   11,   12,   13,   14
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*Nset, nset=MENGPI_DI_CNS_, internal, instance=MENGPI2-1, generate
    1,  3980,     1
*Nset, nset=MENGPI_SIDE_CNS_, internal, instance=BIAN-1
    1,    2,    3,    4,    5,    6
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*Nset, nset=M_SET-12_CNS_, internal, instance=WANGGE-1
    4,    5,    6,    8,    9,   12
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*Nset, nset=S_SET-13_CNS_, internal, instance=WANGGE-1
    1,    2,    3,    4,    5,    6
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*Nset, nset=WANGGE_SIDE_ALL_CNS_, internal, instance=WANGGE-1
   15,   16,   29,   30,   43,   44
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*Nset, nset=_PICKEDSET17, internal, instance=JIAJU-1
    1,    2,    5,    8,   13,   14
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*Elset, elset=_PICKEDSET17, internal, instance=JIAJU-1
  841,  842,  843,  844,  845,  851
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*Elset, elset=_S_SURF-6_SNEG, internal, instance=BIAN-1
 214, 215, 216, 217, 218, 219
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*Surface, type=ELEMENT, name=S_SURF-6
_S_SURF-6_SNEG, SNEG
*Elset, elset=__PICKEDSURF18_S5_1, internal, instance=JIAJU-1
 1991, 1992, 1993, 1994, 1995, 2006
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*Elset, elset=__PICKEDSURF18_S3_1, internal, instance=JIAJU-1
 1981, 1982, 1983, 1984, 1985, 1996
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*Surface, type=ELEMENT, name=_PICKEDSURF18, internal
__PICKEDSURF18_S5_1, S5
__PICKEDSURF18_S3_1, S3
*Elset, elset=__PICKEDSURF21_S5_1, internal, instance=JIAJU-1
 121, 122, 123, 124, 125, 126
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*Elset, elset=__PICKEDSURF21_S4_1, internal, instance=JIAJU-1
  427,  434,  441,  448,  455,  462
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*Elset, elset=__PICKEDSURF21_S2_1, internal, instance=JIAJU-1, generate
 1561,  1620,     1
*Elset, elset=__PICKEDSURF21_S1_1, internal, instance=JIAJU-1
 1501, 1502, 1503, 1504, 1505, 1506
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*Surface, type=ELEMENT, name=_PICKEDSURF21, internal
__PICKEDSURF21_S5_1, S5
__PICKEDSURF21_S4_1, S4
__PICKEDSURF21_S2_1, S2
__PICKEDSURF21_S1_1, S1
*Surface, type=NODE, name=MENGPI_DI_CNS__CNS_, internal
MENGPI_DI_CNS_, 1.
*Surface, type=NODE, name=BIAN_DI_CNS__CNS_, internal
BIAN_DI_CNS_, 1.
*Surface, type=NODE, name=M_SET-12_CNS__CNS_, internal
M_SET-12_CNS_, 1.
*Surface, type=NODE, name=MENGPI_SIDE_CNS__CNS_, internal
MENGPI_SIDE_CNS_, 1.
*Surface, type=NODE, name=WANGGE_SIDE_ALL_CNS__CNS_, internal
WANGGE_SIDE_ALL_CNS_, 1.
*Surface, type=NODE, name=MENGPI_CRICLE_IN_CNS__CNS_, internal
MENGPI_CRICLE_IN_CNS_, 1.
*Surface, type=NODE, name=S_SET-13_CNS__CNS_, internal
S_SET-13_CNS_, 1.
** Constraint: BIAN_PI-1
*Tie, name=BIAN_PI-1, adjust=yes
BIAN_DI_CNS__CNS_, MENGPI_DI_CNS__CNS_
** Constraint: CONSTRAINT-3-1
*Tie, name=CONSTRAINT-3-1, adjust=no, position tolerance=10.
MENGPI_DI_CNS__CNS_, M_SET-12_CNS__CNS_
** Constraint: CONSTRAINT-4-1
*Tie, name=CONSTRAINT-4-1, adjust=no, position tolerance=10.
WANGGE_SIDE_ALL_CNS__CNS_, MENGPI_SIDE_CNS__CNS_
** Constraint: CONSTRAINT-5-1
*Tie, name=CONSTRAINT-5-1, adjust=no, position tolerance=10.
S_SET-13_CNS__CNS_, MENGPI_CRICLE_IN_CNS__CNS_
** Constraint: JIAJU-MENGPI-1
*Tie, name=JIAJU-MENGPI-1, adjust=no, position tolerance=5.
_PICKEDSURF21, S_SURF-6
** Constraint: LOAD
*Coupling, constraint name=LOAD, ref node=JIAJU-1.OUTPUT, surface=_PICKEDSURF18
*Kinematic
*End Assembly
*Amplitude, name=AMP-1
             0.,              0.,             0.1,              1.
**
** MATERIALS
**
*Material, name=AL
*Density
 2.72e-09,
*Elastic
68100., 0.33
*Plastic
  272.,    0.
 307.5, 0.135
**
** BOUNDARY CONDITIONS
**
** Name: Disp-BC-1 Type: Symmetry/Antisymmetry/Encastre
*Boundary
_PICKEDSET17, ENCASTRE
** ----------------------------------------------------------------
**
** STEP: Step-1
**
*Step, name=Step-1, nlgeom=YES
*Dynamic, Explicit
, 0.1
*Bulk Viscosity
0.06, 1.2
**
** BOUNDARY CONDITIONS
**
** Name: Disp-BC-2 Type: Displacement/Rotation
*Boundary, amplitude=AMP-1
JIAJU-1.OUTPUT, 1, 1
** Name: Disp-BC-3 Type: Displacement/Rotation
*Boundary, amplitude=AMP-1
JIAJU-1.OUTPUT, 2, 2, -4.
** Name: Disp-BC-4 Type: Displacement/Rotation
*Boundary, amplitude=AMP-1
JIAJU-1.OUTPUT, 3, 3
** Name: Disp-BC-5 Type: Displacement/Rotation
*Boundary, amplitude=AMP-1
JIAJU-1.OUTPUT, 4, 4
** Name: Disp-BC-6 Type: Displacement/Rotation
*Boundary, amplitude=AMP-1
JIAJU-1.OUTPUT, 5, 5
** Name: Disp-BC-7 Type: Displacement/Rotation
*Boundary, amplitude=AMP-1
JIAJU-1.OUTPUT, 6, 6
**
** OUTPUT REQUESTS
**
*Restart, write, number interval=1, time marks=NO
**
** FIELD OUTPUT: F-Output-2
**
*Output, field, number interval=100, time marks=YES
*Node Output
U,
*Element Output, directions=YES
E, EEQUT, LE, MISES, NE, NEEQ, PE, PEEQ
**
** FIELD OUTPUT: F-Output-1
**
*Node Output
RF, U
**
** HISTORY OUTPUT: H-Output-1
**
*Output, history, time interval=0.001
*Node Output, nset=JIAJU-1.OUTPUT
RF2, U1, U2, U3
**
** HISTORY OUTPUT: H-Output-2
**
*Output, history
*Energy Output
ALLAE, ALLIE, ALLKE, ALLPD, ETOTAL
*End Step
