*Heading
** Job name: VS_in_design Model name: Model-1-Exp
** Generated by: Abaqus/CAE 2020
*Preprint, echo=NO, model=NO, history=NO, contact=NO
**
** PARTS
**
*Part, name=JiaJu
*Node
      1,         100.,  -465.600006,           0.
      2,        -100.,  -465.600006,           0.
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*Element, type=C3D8R
  1,  144,  993, 3073,  969,    1,   41,  741,   90
  2,  993,  994, 3074, 3073,   41,   42,  742,  741
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*Node
   4745,           0.,   515.599976,        10.25
*Nset, nset=JiaJu-RefPt_, internal
4745,
*Nset, nset=Set-3, generate
    1,  4744,     1
*Elset, elset=Set-3, generate
    1,  3120,     1
*Nset, nset=JiaJu-Shang
   21,   22,   23,   24,   34,   35
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*Elset, elset=JiaJu-Shang
 1561, 1562, 1563, 1564, 1565, 1566
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*Nset, nset=JiaJu-Xia
    3,    4,    6,    7,   10,   11
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*Elset, elset=JiaJu-Xia
  121,  122,  123,  124,  125,  126
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*Nset, nset=JiaJu-S-Load
   29,   30,   31,   32,  503,  504
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*Elset, elset=JiaJu-S-Load, generate
 1985,  2280,     5
*Nset, nset=JiaJu-X-Load
   13,   14,   15,   16,  245,  246
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*Elset, elset=JiaJu-X-Load, generate
  845,  1140,     5
*Nset, nset=output
 4745,
** Section: JiaJu
*Solid Section, elset=Set-3, material=AL
,
*End Part
**
*Part, name=WangGe
*Node
      1,    153.62352,   57.7999992,           0.
      2,    153.62352,   57.7999992,          18.
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*Element, type=S4R
 1,    1,  165, 3811,  188
 2,  165,  166, 3812, 3811
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*Nset, nset=_PickedSet2_#29, internal
    3,    4,    7,    8,   11,   12
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*Elset, elset=_PickedSet2_#29, internal
   91,   92,   93,  703,  704,  705
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*Nset, nset=_PickedSet2_#30, internal
   15,   16,   31,   32,   41,   42
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*Elset, elset=_PickedSet2_#30, internal
  724,  725,  726,  727,  728,  729
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*Nset, nset=_PickedSet2_#31, internal
   33,   34,   37,   38,   47,   48
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*Elset, elset=_PickedSet2_#31, internal
  682,  683,  684,  685,  686,  687
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*Nset, nset=_PickedSet2_#32, internal
  139,  140,  141,  142,  143,  144
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*Elset, elset=_PickedSet2_#32, internal, generate
 5236,  5358,     1
*Nset, nset=_PickedSet2_#33, internal
  131,  132,  133,  134,  135,  136
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*Elset, elset=_PickedSet2_#33, internal, generate
 4825,  5181,     1
*Nset, nset=_PickedSet2_#34, internal
  123,  124,  125,  126,  127,  128
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*Elset, elset=_PickedSet2_#34, internal, generate
 4420,  4776,     1
*Nset, nset=_PickedSet2_#35, internal
   23,   24,   25,   26,  119,  120
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*Elset, elset=_PickedSet2_#35, internal
  214,  215,  216,  217,  218,  219
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*Nset, nset=_PickedSet2_#36, internal
   19,   20,   21,   22,  115,  116
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*Elset, elset=_PickedSet2_#36, internal
   94,   95,   96,   97,   98,   99
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*Nset, nset=_PickedSet2_#37, internal
  107,  108,  109,  110,  111,  112
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*Elset, elset=_PickedSet2_#37, internal, generate
 3700,  4059,     1
*Nset, nset=_PickedSet2_#38, internal
   99,  100,  101,  102,  103,  104
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*Elset, elset=_PickedSet2_#38, internal, generate
 3307,  3666,     1
*Nset, nset=_PickedSet2_#39, internal
   91,   92,   93,   94,   95,   96
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*Elset, elset=_PickedSet2_#39, internal, generate
 2914,  3273,     1
*Nset, nset=_PickedSet2_#40, internal
    9,   10,   11,   12,   13,   14
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*Elset, elset=_PickedSet2_#40, internal
   58,   59,   60,   61,   62,   63
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*Nset, nset=_PickedSet2_#41, internal
    5,    6,    7,    8,   77,   78
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*Elset, elset=_PickedSet2_#41, internal
   34,   35,   36,   37,   38,   39
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*Nset, nset=_PickedSet2_#42, internal
    1,    2,    3,    4,   69,   70
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*Elset, elset=_PickedSet2_#42, internal
    1,    2,    3,    4,    5,    6
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*Nset, nset=_PickedSet2_#43, internal
   57,   58,   59,   60,   61,   62
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*Elset, elset=_PickedSet2_#43, internal, generate
 1594,  1953,     1
*Nset, nset=_PickedSet2_#44, internal
   47,   48,   49,   50,   51,   52
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*Elset, elset=_PickedSet2_#44, internal, generate
 1165,  1527,     1
*Nset, nset=_PickedSet2_#45, internal
   37,   38,   39,   40,   41,   42
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*Elset, elset=_PickedSet2_#45, internal, generate
  745,  1101,     1
*Nset, nset=_PickedSet2_#46, internal
   27,   28,   29,   30,   31,   32
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*Elset, elset=_PickedSet2_#46, internal, generate
 325,  681,    1
** Section: jin_2_10
*Shell Section, elset=_PickedSet2_#42, material=AL
1.67282, 5
** Section: jin_2_9
*Shell Section, elset=_PickedSet2_#41, material=AL
1.84233, 5
** Section: jin_2_8
*Shell Section, elset=_PickedSet2_#40, material=AL
2.03808, 5
** Section: jin_1_1
*Shell Section, elset=_PickedSet2_#29, material=AL
0.785963, 5
** Section: jin_2_4
*Shell Section, elset=_PickedSet2_#36, material=AL
2.39151, 5
** Section: jin_2_3
*Shell Section, elset=_PickedSet2_#35, material=AL
2.31762, 5
** Section: jin_2_14
*Shell Section, elset=_PickedSet2_#46, material=AL
1.10942, 5
** Section: jin_1_3
*Shell Section, elset=_PickedSet2_#31, material=AL
1.171, 5
** Section: jin_1_2
*Shell Section, elset=_PickedSet2_#30, material=AL
0.726357, 5
** Section: jin_2_13
*Shell Section, elset=_PickedSet2_#45, material=AL
1.24775, 5
** Section: jin_2_12
*Shell Section, elset=_PickedSet2_#44, material=AL
1.38778, 5
** Section: jin_2_11
*Shell Section, elset=_PickedSet2_#43, material=AL
1.52948, 5
** Section: jin_2_7
*Shell Section, elset=_PickedSet2_#39, material=AL
2.22334, 5
** Section: jin_2_6
*Shell Section, elset=_PickedSet2_#38, material=AL
2.36143, 5
** Section: jin_2_5
*Shell Section, elset=_PickedSet2_#37, material=AL
2.41561, 5
** Section: jin_2_2
*Shell Section, elset=_PickedSet2_#34, material=AL
2.19151, 5
** Section: jin_2_1
*Shell Section, elset=_PickedSet2_#33, material=AL
2.0108, 5
** Section: jin_2_0
*Shell Section, elset=_PickedSet2_#32, material=AL
1.77307, 5
*End Part
**
*Part, name=bian
*Node
      1,   304.799988,  -355.600006,         20.5
      2,   304.799988,   355.600006,         20.5
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*Element, type=S4R
  1,   1,  25, 781, 168
  2,  25,  26, 782, 781
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*Nset, nset=Set-8
    9,   10,   11,   12,   13,   14
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*Elset, elset=Set-8
  793,  794,  795,  796,  797,  798
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*Nset, nset=Set-9
    1,    2,    3,    4,    5,    6
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*Elset, elset=Set-9, generate
   1,  792,    1
*Nset, nset=Set-11
    9,   10,   11,   12,   13,   14
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*Elset, elset=Set-11, generate
  793,  1134,     1
** Section: bian
*Shell Section, elset=Set-9, material=AL, offset=SNEG
2.5, 5
** Section: bian
*Shell Section, elset=Set-11, material=AL, offset=SPOS
2.5, 5
*End Part
**
*Part, name=mengpi2
*Node
      1,   160.481491,   217.800003,           0.
      2,   160.481491,   355.600006,           0.
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*Element, type=S4R
  1,   1,  29, 570,  81
  2,  29,  30, 571, 570
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*Nset, nset=Set-1, generate
    1,  3980,     1
*Elset, elset=Set-1, generate
    1,  3792,     1
*Nset, nset=mengpi2, generate
    1,  3980,     1
*Elset, elset=mengpi2, generate
    1,  3792,     1
*Nset, nset=top
   2,   3,  12,  22,  42,  43
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*Elset, elset=top
   14,   28,   42,   56,   70,   84
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*Nset, nset=bottom
  15,  19,  24,  25, 223, 224
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*Elset, elset=bottom
  825,  826,  827,  828,  829,  830
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** Section: mengpi
*Shell Section, elset=Set-1, material=AL
2.5, 5
*End Part
**
**
** ASSEMBLY
**
*Assembly, name=Assembly
**
*Instance, name=mengpi2-1, part=mengpi2
          0.,           0.,        -1.25
*End Instance
**
*Instance, name=JiaJu-1, part=JiaJu
          0.,           0.,         -2.5
*End Instance
**
*Instance, name=bian-1, part=bian
          0.,           0.,         -2.5
*End Instance
**
*Instance, name=WangGe-1, part=WangGe
*End Instance
**
*Node
      1,           0.,   515.599976,           9.
*Nset, nset=MengPiCe, instance=JiaJu-1
    3,    4,    6,    7,   10,   11
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*Nset, nset=MengPiCe, instance=bian-1
    1,    2,    3,    4,    5,    6
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*Elset, elset=MengPiCe, instance=JiaJu-1
  121,  122,  123,  124,  125,  126
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*Elset, elset=MengPiCe, instance=bian-1
   1,   2,   3,   4,   5,   6
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*Nset, nset=Mengpi_cricle_in, instance=bian-1
    9,   10,   11,   12,   13,   14
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*Elset, elset=Mengpi_cricle_in, instance=bian-1, generate
  793,  1134,     1
*Nset, nset=Mengpi_di, instance=mengpi2-1, generate
    1,  3980,     1
*Elset, elset=Mengpi_di, instance=mengpi2-1, generate
    1,  3792,     1
*Nset, nset=Mengpi_side, instance=bian-1
    1,    2,    3,    4,    5,    6
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*Elset, elset=Mengpi_side, instance=bian-1, generate
   1,  792,    1
*Nset, nset=WangGe_cricle_side, instance=WangGe-1
    1,    2,    5,    6,    9,   10
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*Elset, elset=WangGe_cricle_side, instance=WangGe-1
    1,    2,    3,   34,   35,   36
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*Nset, nset=WangGe_di, instance=WangGe-1
    1,    4,    5,    8,    9,   12
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*Elset, elset=WangGe_di, instance=WangGe-1
    1,    4,    7,   10,   13,   16
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*Nset, nset=WangGe_side_all, instance=WangGe-1
   27,   28,   33,   34,   35,   36
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*Elset, elset=WangGe_side_all, instance=WangGe-1
  325,  326,  327,  607,  608,  609
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*Nset, nset=bian_di, instance=bian-1
   3,   4,   6,   8,   9,  12
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*Elset, elset=bian_di, instance=bian-1
  143,  144,  145,  146,  147,  148
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*Nset, nset=m_Set-5
 1,
*Nset, nset=mengpi_middown, instance=mengpi2-1
 24,
*Nset, nset=mengpi_midup, instance=mengpi2-1
 3,
*Nset, nset=_PickedSet17, internal, instance=JiaJu-1
    1,    2,    5,    8,   13,   14
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*Elset, elset=_PickedSet17, internal, instance=JiaJu-1
  841,  842,  843,  844,  845,  851
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*Elset, elset=_s_Surf-6_SNEG, internal, instance=bian-1
 214, 215, 216, 217, 218, 219
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*Surface, type=ELEMENT, name=s_Surf-6
_s_Surf-6_SNEG, SNEG
*Elset, elset=__PickedSurf18_S5, internal, instance=JiaJu-1
 1991, 1992, 1993, 1994, 1995, 2006
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*Elset, elset=__PickedSurf18_S3, internal, instance=JiaJu-1
 1981, 1982, 1983, 1984, 1985, 1996
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*Surface, type=ELEMENT, name=_PickedSurf18, internal
__PickedSurf18_S5, S5
__PickedSurf18_S3, S3
*Elset, elset=__PickedSurf21_S5, internal, instance=JiaJu-1
 121, 122, 123, 124, 125, 126
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*Elset, elset=__PickedSurf21_S4, internal, instance=JiaJu-1
  427,  434,  441,  448,  455,  462
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*Elset, elset=__PickedSurf21_S1, internal, instance=JiaJu-1
 1501, 1502, 1503, 1504, 1505, 1506
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*Elset, elset=__PickedSurf21_S2, internal, instance=JiaJu-1, generate
 1561,  1620,     1
*Surface, type=ELEMENT, name=_PickedSurf21, internal
__PickedSurf21_S5, S5
__PickedSurf21_S4, S4
__PickedSurf21_S2, S2
__PickedSurf21_S1, S1
*Surface, type=NODE, name=WangGe_di_CNS_, internal
WangGe_di, 1.
*Surface, type=NODE, name=Mengpi_di_CNS_, internal
Mengpi_di, 1.
*Surface, type=NODE, name=Mengpi_side_CNS_, internal
Mengpi_side, 1.
*Surface, type=NODE, name=WangGe_side_all_CNS_, internal
WangGe_side_all, 1.
*Surface, type=NODE, name=Mengpi_cricle_in_CNS_, internal
Mengpi_cricle_in, 1.
*Surface, type=NODE, name=WangGe_cricle_side_CNS_, internal
WangGe_cricle_side, 1.
*Surface, type=NODE, name=bian_di_CNS_, internal
bian_di, 1.
** Constraint: Constraint-3
*Tie, name=Constraint-3, adjust=no, position tolerance=10.
Mengpi_di_CNS_, WangGe_di_CNS_
** Constraint: Constraint-4
*Tie, name=Constraint-4, adjust=no, position tolerance=10.
WangGe_side_all_CNS_, Mengpi_side_CNS_
** Constraint: Constraint-5
*Tie, name=Constraint-5, adjust=no, position tolerance=10.
WangGe_cricle_side_CNS_, Mengpi_cricle_in_CNS_
** Constraint: JiaJu-MengPi
*Tie, name=JiaJu-MengPi, adjust=no, position tolerance=5.
_PickedSurf21, s_Surf-6
** Constraint: bian_pi
*Tie, name=bian_pi, adjust=yes
bian_di_CNS_, Mengpi_di_CNS_
** Constraint: load
*Coupling, constraint name=load, ref node=JiaJu-1.output, surface=_PickedSurf18
*Kinematic
*End Assembly
*Amplitude, name=Amp-1
             0.,              0.,             0.1,              1.
**
** MATERIALS
**
*Material, name=AL
*Density
 2.72e-09,
*Elastic
68100., 0.3
*Plastic
  272.,    0.
 307.5, 0.135
**
** BOUNDARY CONDITIONS
**
** Name: BC-1 Type: Symmetry/Antisymmetry/Encastre
*Boundary
_PickedSet17, ENCASTRE
** ----------------------------------------------------------------
**
** STEP: Step-1
**
*Step, name=Step-1, nlgeom=YES
*Dynamic, Explicit
, 0.1
*Bulk Viscosity
0.06, 1.2
**
** BOUNDARY CONDITIONS
**
** Name: BC-2 Type: Displacement/Rotation
*Boundary, amplitude=Amp-1
JiaJu-1.output, 1, 1
JiaJu-1.output, 2, 2, -4.
JiaJu-1.output, 3, 3
JiaJu-1.output, 4, 4
JiaJu-1.output, 5, 5
JiaJu-1.output, 6, 6
**
** OUTPUT REQUESTS
**
*Restart, write, number interval=1, time marks=NO
**
** FIELD OUTPUT: F-Output-1
**
*Output, field, number interval=50, time marks=YES
*Node Output
RF, U
*Element Output, directions=YES
E, MISES, PE, PEEQ
**
** HISTORY OUTPUT: H-Output-1
**
*Output, history, variable=PRESELECT, frequency=10
**
** HISTORY OUTPUT: H-Output-mengpi-down
**
*Output, history, time interval=0.001
*Node Output, nset=mengpi_middown
U1, U2, U3
**
** HISTORY OUTPUT: H-Output-mengpi-up
**
*Node Output, nset=mengpi_midup
U1, U2, U3
**
** HISTORY OUTPUT: H-Output-2
**
*Node Output, nset=JiaJu-1.output
RF2, U1, U2, U3
*End Step
